# 1. Вычислить выражение:
x1 := 2
n := 1
y1 := (sqrt(x1^3 + n) + cos(|n*x1 - 1|)^2)/(nthroot(x1^5 + sin(x1) + n, 4)*cos(π*(x1 + n)/4))
y1 = -1.92924
# 2. Вычислить значения переменных:
y2 := 10
x2 := 7
z2 := -3
p :=
    sin(x2) + 3*y2 - z2^2 if (x2 > y2)
    ((y2 + 3)/sqrt(z2^2 + 1)*ln(|x2 + 1|)) otherwise
p = 8.5485
q :=
    (cos(x2) + 2*|y2 + 1| - z2) if ((x2 > y2) and (x2 < 1))
    (x2*y2)/sqrt(y2^2 + 5) otherwise
q = 6.8313
w :=
    (x2^2 + 2*(y2*x2 + 1) - z2) if ((x2 < y2) or (y2 ≥ 10))
    ((x2^-3*y2^2 + 3)*sqrt(z2^2 + 7)) otherwise
w = 194
# 3. Вычислить значение функции:
x3 := -2, -1.6 .. 2
x3 = [-2; -1.6; -1.2; -0.8; -0.4; 0; 0.4; 0.8; 1.2; 1.6; 2]
n3 := 2
f(x3) := (x3^2 - n3*x3 + sin(x3))*sqrt(|x3 - cos(n3*x3)|)
f(x3) = [8.22753; 3.69265; 1.97785; 1.33681; 0.597535; 0; -0.136494; -0.220952; -0.0389189; 0.579605; 1.48125]
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# 4. Выполнить действия с использованием массивом:
n4 := round(rnd(10), 0)
a4 := -3*n4
b4 := 3*n4
mA1 := runif(3, a4, b4)
A1 := [mA1[0], mA1[1], mA1[2]]
A1 = [1.02007, -1.7963, 3.87405]
mB1 := runif(3, a4, b4)
B1 := [mB1[0], mB1[1], mB1[2]]
B1 = [-3.91045, 2.52594, -2.35217]
mC1 := runif(3, a4, b4)
C1 := [mC1[0], mC1[1], mC1[2]] = [-4.90306, -4.23224, 5.8621]
s4 := mA1*mB1 = -17.6387
w4 := (mA1×mB1)*mC1 = 55.151
v4 := mA1×mB1 = [-5.56044; -12.7499; -4.44771]
lA1 := sqrt(mA1[0]^2 + mA1[1]^2 + mA1[2]^2) = 4.39039
lB1 := sqrt(mB1[0]^2 + mB1[1]^2 + mB1[2]^2) = 5.21581
lC1 := sqrt(mC1[0]^2 + mC1[1]^2 + mC1[2]^2) = 8.73591
ans4 :=
    "Это A" if ((lA1 > lB1) and (lA1 > lC1))
    "Это B" if ((lB1 > lA1) and (lB1 > lC1))
    "Это C" if ((lC1 > lA1) and (lC1 > lB1))
ans4 = "Это C"
M1[9, 9] := 9
i := 0, 1 .. 9
j := 0, 1 .. 9
M1[i, j] := round(rnd(20) - 10)
C4 := M1[:, 0]
L4 := transpose(M1)[:, 9]
C4 = [-8; 9; 4; 5; -7; -4; 7; 7; -10; 2]
transpose(L4) = [2, 3, 0, 4, -6, -6, -1, -8, -8, 9]
M1 = [
    -8, -10, 1, 2, -7, -1, -9, 6, 0, 8;
    9, 1, -1, 7, 6, 10, 2, -5, 7, -2;
    4, -10, -4, 2, 7, 0, 5, -1, 5, 2;
    5, 1, -7, -1, 0, 5, -7, 0, 4, -7;
    -7, 4, -1, 9, -7, 6, -6, 6, -7, 5;
    -4, 4, 4, -8, 7, 0, -1, 9, 1, -1;
    7, -1, 10, 5, -6, 7, 0, -9, 1, 1;
    7, 3, 7, -8, -4, -4, -7, 7, 2, -5;
    -10, 6, -6, 1, -8, 5, 1, -1, 4, -1;
    2, 3, 0, 4, -6, -6, -1, -8, -8, 9
]
cl4 := C4*transpose(L4) = [
    -16, -24, 0, -32, 48, 48, 8, 64, 64, -72;
    18, 27, 0, 36, -54, -54, -9, -72, -72, 81;
    8, 12, 0, 16, -24, -24, -4, -32, -32, 36;
    10, 15, 0, 20, -30, -30, -5, -40, -40, 45;
    -14, -21, 0, -28, 42, 42, 7, 56, 56, -63;
    -8, -12, 0, -16, 24, 24, 4, 32, 32, -36;
    14, 21, 0, 28, -42, -42, -7, -56, -56, 63;
    14, 21, 0, 28, -42, -42, -7, -56, -56, 63;
    -20, -30, 0, -40, 60, 60, 10, 80, 80, -90;
    4, 6, 0, 8, -12, -12, -2, -16, -16, 18
]
sum4_3 :=
    for i ∈ 0 .. 9
        for j ∈ 0 .. 9
            sum4_3 ← sum4_3 + M1[i, j] if M1[i, j] < 0
sum4_2 :=
    for i ∈ 0 .. 9
        for j ∈ 0 .. 9
            sum4_2 ← sum4_2 + M1[i, j] if M1[i, j] ≥ 0
sum4_1 :=
    for i ∈ 0 .. 9
        for j ∈ 0 .. 9
            sum4_1 ← sum4_1 + M1[i, j]
sum4_3 = -221
sum4_2 = 246
sum4_1 = 25
# 5. Построить график функции быстрым способом:
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y(x5) := e^(-(|x5|/3))*cos(x5)
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# 6. Построить график функции, подготовив данные самостоятельно:
x6 := -9, -8.75 .. 9
f6(x6) := if(x6 < 0, e^x6*x6^3, e^(-x6)*x6^3)
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# 7. Выполнить указанные действия:
x71 := -2*π
s2 := 1, 2 .. 16
Δx := π/4
x7[s2] := x71 + Δx*s2
g7(x7) := sqrt(|x7|)*sin(x7)
g7(x7) = [0; 2.69879; 3.81667; 2.69879; 0; -2.69879; -3.81667; -2.69879; 0; 2.69879; 3.81667; 2.69879; 0; -2.69879; -3.81667; -2.69879; 0]
x7 = [0; -5.49779; -4.71239; -3.92699; -3.14159; -2.35619; -1.5708; -0.785398; 0; 0.785398; 1.5708; 2.35619; 3.14159; 3.92699; 4.71239; 5.49779; 6.28319]
O := x7
Y11 := g7(x7)
filename1 := "X.txt"
filename2 := "Y.txt"
WRITEPRN(filename1) := O
WRITEPRN(filename2) := Y11
XX := READPRN(filename1)
YY := READPRN(filename2)
YY = [0; 2.699; 3.817; 2.699; 0; -2.699; -3.817; -2.699; 0; 2.699; 3.817; 2.699; 0; -2.699; -3.817; -2.699; 0]
XX = [0; -5.498; -4.712; -3.927; -3.142; -2.356; -1.571; -0.7854; 0; 0.7854; 1.571; 2.356; 3.142; 3.927; 4.712; 5.498; 6.283]
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# 8. Построить графики "быстрым" способом:
x8 := -3 .. 3
q1(x8) := e^(-x8^2)
q2(x8) := d/dx8(q1(x8))
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# 9. Построить график поверхности "быстрым" способом:
x911 := -15
x912 := 15
Δx91 := 1
i91 := 0 .. 42
y911 := -15
y912 := 15
Δy91 := 1
j91 := 0 .. 42
h(x91, y91) := sin(sqrt(x91^2 + y91^2))/sqrt(x91^2 + y91^2)
x91[i91] := -15 + (30/43)*i91
y91[j91] := -15 + (30/43)*j91
Z[i91, j91] := h(x91[i91], y91[j91])
# [component: inputs Z]
# 10. Найти все корни уравнения на отрезке и выполнить проверку найденных решений:
x10 := -5 .. 5
f10(x10) := x10^2 + (x10 - 2)*sin(x10) - 5
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root(f10(x10), x10) = [-1.32936; -1.32936; -1.32936; -1.32936; -1.32936; -1.32936; 2.19967; 2.19967; 2.19967; 2.19967; 2.19967]
# 11. Найти все корни уравнения на отрезке и выполнить проверку найденных решений:
x11 := -4 .. 4
f11(x11) := x11^2 + x11*sin(2*x11) - (x11 - 5)*cos(x11)
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root(f11(x11), x11) = [-2.97354; -2.97354; -1.93283; -2.97354; -1.93283; -1.93283; -2.97354; -1.93283; -1.93283]
root(f11(x11), x11, -4, -2) = -2.97354
root(f11(x11), x11, -2, 4) = -1.93283
# 12. Найти все корни полинома:
n12 := 1
p12(x12) := x12^3 + (4 - n12)*x12^2 + (3 - 4*n12)*x12 - 3*n12
V12 := [3*n12; 3 - 4*n12; 4 - n12; 1]
X12 := polyroots(V12)
X12 = [-3.5251; 0.262551 - 0.884368i; 0.262551 + 0.884368i]
# 13. Решить систему линейных уравнений:
A13 := [n, (n + 1), (n + 2); (n - 3), (n - 2), n; (n - 1), n, (n + 1)]
B13 := [(6*n + 8); (6*n - 7); (6*n + 2)]
X13 := 0
[x13; y13; z13] := A13^-1*B13
[x13; y13; z13] = [1; 2; 3]
Y13 := 0
Z13 := 0
Given
n*X13 + (n + 1)*Y13 + (n + 2)*Z13 == 6*n + 8
(n - 3)*X13 + (n - 2)*Y13 + n*Z13 == 6*n - 7
(n - 1)*X13 + n*Y13 + (n + 1)*Z13 == 6*n + 2
Find(X13, Y13, Z13) → [1; 2; 3]
# 14. Найти координаты точек пересечения эллипса и окружности:
(X14^2/81) + (Y14^2/16) - 1 == (X14 - 9)^2 + (Y14 - 2)^2 - 25 solve, X14, Y14 → [9/2, 0; 549/40, 0]
# 15. Найти все локальные максимумы и минимумы функции:
f15(x15) := x15*sin(x15)
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Минимум
x15 := 5
x15 := Minimize(f15, x15)
x15 = 4.91318
f15(x15) = -4.81447
f15(10) = -5.44021
Максимумы
x15 := 8
x15 := Maximize(f15, x15)
x15 = 7.97867
x15 := 2
x15 := Maximize(f15, x15)
x15 = 2.02876
