Xa := -2
Ya := -4
Xb := -3
Yb := 0
Xc := 0
Yc := 4
Xd := 3
Yd := 0
Xe := 2
Ye := -4
Xlw := 100
Ylw := 200
Xf := -2
Yf := 0
Xhw := 400
Yhw := 500
Xg := 2
Yg := 0
Zx := transpose([Xa, Xb, Xc, Xd, Xe, Xf, Xg])
Zy := transpose([Ya, Yb, Yc, Yd, Ye, Yf, Yg])
Xl := min(Zx) = -3
Yl := min(Zy) = -4
Xh := max(Zx) = 3
Yh := max(Zy) = 4
qXw := Xhw - Xlw = 300
qYw := Yhw - Ylw = 300
qX := Xh - Xl = 6
qY := Yh - Yl = 8
Kx := qXw/qX = 50
Ky := qYw/qY = 37.5
# Матрица пересчетов на МСК в ОСК:
Tsw := [Kx, 0, Xlw - Kx*Xl; 0, -Ky, Yhw + Ky*Yl; 0, 0, 1]
# Вычисляем координаты в ОСК:
[Xaw; Yaw; q] := Tsw*[Xa; Ya; 1] = [150; 500; 1]
[Xbw; Ybw; q] := Tsw*[Xb; Yb; 1] = [100; 350; 1]
[Xcw; Ycw; q] := Tsw*[Xc; Yc; 1] = [250; 200; 1]
[Xdw; Ydw; q] := Tsw*[Xd; Yd; 1] = [400; 350; 1]
[Xew; Yew; q] := Tsw*[Xe; Ye; 1] = [350; 500; 1]
[Xfw; Yfw; q] := Tsw*[Xf; Yf; 1] = [150; 350; 1]
[Xgw; Ygw; q] := Tsw*[Xg; Yg; 1] = [350; 350; 1]
Xw := transpose([Xbw, Xcw, Xdw, Xbw, Xfw, Xaw, Xew, Xgw, Xdw])
X := transpose([Xb, Xc, Xd, Xb, Xf, Xa, Xe, Xg, Xd])
Yw := -transpose([Ybw, Ycw, Ydw, Ybw, Yfw, Yaw, Yew, Ygw, Ydw])
Y := transpose([Yb, Yc, Yd, Yb, Yf, Ya, Ye, Yg, Yd])
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f(x) := sqrt(|x|)*sin(π*x)
x1 := -6
x2 := 6
Δx := 0.1
# Область отображения в окне:
Xlw := 100
Xhw := 800
Ylw := 200
Yhw := 900
N := round((x2 - x1)/Δx) = 120
i := 0 .. N
X[i] := x1 + i*Δx
Y[i] := f(X[i])
Z[i] := 1
# Область отображения в мировой системе координат:
Xl := min(X) = -6
Xh := max(X) = 6
Yl := min(Y) = -2.34521
Yh := max(Y) = 2.34521
M := stack(transpose(X), transpose(Y), transpose(Z))
ΔXw := Xhw - Xlw = 700
ΔX := Xh - Xl = 12
ΔYw := Yhw - Ylw = 700
ΔY := Yh - Yl = 4.69042
kx := ΔXw/ΔX = 58.3333
ky := ΔYw/ΔY = 149.241
# Матрица пересчетов из МСК в ОСК:
Tsw := [kx, 0, Xlw - kx*Xl; 0, -ky, Yhw + ky*Yl; 0, 0, 1]
Mw := Tsw*M
Xw := transpose(Mw)[:, 0]
Yw := (-transpose(Mw))[:, 1]
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